Simulations Simulation_-7.125_30.575_2011_MgtMais0_320_2: Version=174
  Simulation
    Clock: Start=2011-01-01; End=2012-12-31
    Summary
    Weather
      FileName:
        s)    ()
        2011   1   21.8  28.3  20.1   0.0   1.2 999999
        2011   2   21.9  28.3  20.0   0.0   1.3 999999
        2011   3   23.5  28.8  19.7   0.0   1.3 999999
        2011   4   23.4  28.6  20.2   0.0   1.2 999999
        2011   5   21.3  27.5  20.2  17.1   1.1 999999
        2011   6   13.3  25.7  20.1   4.5   1.2 999999
        2011   7   17.7  25.7  20.4   4.5   1.3 999999
        2011   8   21.3  27.0  20.2   4.5   1.3 999999
        2011   9   16.0  25.8  20.1   9.0   1.1 999999
        2011  10   20.3  27.3  19.7   0.0   1.2 999999
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    Manager Sow maize on a fixed date
      Crop = maize
      SowingDate = 15-nov
      CultivarName = 24
      SowingDepth = 30.0
      RowSpacing = 500.0
      Population = 7.0
```csharp
using Models.Soils;
using System;
using Models.Core;
using Models.PMF;
using APSIM.Shared.Utilities;

namespace Models
{
    [Serializable]
    public class Script : Model
    {
        [Link] Clock Clock;
        
        [Description("Crop to sow")]
        public IPlant Crop { get; set; }
        
        [Description("Sowing date (d-mmm)")]
        public string SowingDate { get; set; }
        
        [Display(Type = DisplayType.CultivarName)]
        [Description("Cultivar to be sown")]
        public string CultivarName { get; set; }

        [Description("Sowing depth (mm)")]
        public double SowingDepth { get; set; }

        [Description("Row spacing (mm)")]
        public double RowSpacing { get; set; }

        [Description("Plant population (/m2)")]
        public double Population { get; set; }
        
        [EventSubscribe("DoManagement")]
        private void OnDoManagement(object sender, EventArgs e)
        {
            if (DateUtilities.DatesEqual(SowingDate, Clock.Today) && !Crop.IsAlive)
            {
                Crop.Sow(population: Population, cultivar: CultivarName, depth: SowingDepth, rowSpacing: RowSpacing);
            }
        }
    }
}
```
    Manager Fertilise maize at sowing
      Crop = maize
      FertiliserType = UreaN
      Amount = 0.0
```csharp
using Models.Soils;
using System;
using System.Linq;
using Models.Core;
using Models.PMF;
namespace Models
{
    [Serializable]
    public class Script : Model
    {
        [Link] Clock Clock;
        [Link] Fertiliser Fertiliser;
        
        [Description("Crop to be fertilised")]
        public IPlant Crop { get; set; }

        [Description("Type of fertiliser to apply? ")] 
        public Fertiliser.Types FertiliserType { get; set; }
    
        [Description("Amount of fertiliser to be applied (kg/ha)")]
        public double Amount { get; set; }
        
        [EventSubscribe("Sowing")]
        private void OnSowing(object sender, EventArgs e)
        {
            Model crop = sender as Model;
            if (Crop != null && crop.Name.ToLower() == (Crop as IModel).Name.ToLower())
                Fertiliser.Apply(Amount: Amount, Type: FertiliserType);
        }
    }
}
```
    Manager Fertilise maize at sowing
      Crop = maize
      FertiliserType = NO3N
      Amount = 0.0
      script: same as in Simulation.Fertilise maize at sowing
    Manager Tillage on 15-nov
      TillageDate = 15-nov
      TillageType = disc
```csharp
using Models.Soils;
using Models.Core;
using System;
using APSIM.Shared.Utilities;

namespace Models
{
    [Serializable]
    public class Script : Model
    {
        [Link] Clock Clock;
        [Link] Tillage Tillage;
        
        [Description("Tillage date (d-mmm)")]
        public string TillageDate { get; set; }
        
        [Description("Tillage type")]
        public string TillageType { get; set; }
        
        [EventSubscribe("DoManagement")]
        private void OnDoManagement(object sender, EventArgs e)
        {
            if (DateUtilities.DatesEqual(TillageDate, Clock.Today))
                Tillage.Apply(TillageType);
        }
    }
}
```
    Manager Harvest maize
      Crop = maize
```csharp
using APSIM.Shared.Utilities;
using Models.Utilities;
using Models.Soils;
using Models.PMF;
using Models.Core;
using System;
using System.Linq;

namespace Models
{
    [Serializable] 
    public class Script : Model
    {
        [Description("Crop")]
        public IPlant Crop { get; set; }
        
        [EventSubscribe("DoManagement")]
        private void OnDoManagement(object sender, EventArgs e)
        {
            if (Crop.IsReadyForHarvesting)
            {
                Crop.Harvest();
                Crop.EndCrop();
            }
        }
    }
}
```
    Report: EventNames=[Clock].DoReport
      VariableNames:
        [Clock].Today
        [Wheat].Phenology.Stage
        [Wheat].AboveGround.Wt
        [Wheat].Grain.Wt
        [Wheat].Grain.Number
        [Wheat].Leaf.LAI
        [Wheat].Nitrogen.TotalN
        [Wheat].Water.Transpiration
