Simulations Maize Management: Version=174
  Folder Management
    Manager Sow Maize using a rule
      Crop = Maize
      StartDate = 15-oct
      EndDate = 15-dec
      MinESW = 100.0
      MinRain = 25.0
      RainDays = 7
      CultivarName = Pioneer_3394
      SowingDepth = 40.0
      RowSpacing = 750.0
      Population = 8.0
```csharp
using Models.Interfaces;
using APSIM.Shared.Utilities;
using Models.Utilities;
using Models.Soils;
using Models.PMF;
using Models.Core;
using System;
using System.Linq;
using Models.Climate;

namespace Models
{
    [Serializable]
    public class Script : Model
    {
        [Link] private Clock Clock;
        [Link] private Fertiliser Fertiliser;
        [Link] private Summary Summary;
        [Link] private Soil Soil;
        private Accumulator accumulatedRain;
        [Link]
        private ISoilWater waterBalance;
        
        [Description("Crop")]
        public IPlant Crop { get; set; }

        [Description("Start of sowing window (d-mmm)")]
        public string StartDate { get; set; }

        [Description("End of sowing window (d-mmm)")]
        public string EndDate { get; set; }

        [Description("Minimum extractable soil water for sowing (mm)")]
        public double MinESW { get; set; }

        [Description("Accumulated rainfall required for sowing (mm)")]
        public double MinRain { get; set; }

        [Description("Duration of rainfall accumulation (d)")]
        public int RainDays { get; set; }

        [Display(Type = DisplayType.CultivarName)]
        [Description("Cultivar to be sown")]
        public string CultivarName { get; set; }

        [Description("Sowing depth (mm)")]
        public double SowingDepth { get; set; }

        [Description("Row spacing (mm)")]
        public double RowSpacing { get; set; }

        [Description("Plant population (/m2)")]
        public double Population { get; set; }
        
        
        [EventSubscribe("StartOfSimulation")]
        private void OnSimulationCommencing(object sender, EventArgs e)
        {
            accumulatedRain = new Accumulator(this, "[Weather].Rain", RainDays);
        }

        [EventSubscribe("DoManagement")]
        private void OnDoManagement(object sender, EventArgs e)
        {
            accumulatedRain.Update();
            
            if (DateUtilities.WithinDates(StartDate, Clock.Today, EndDate) &&
                !Crop.IsAlive &&
                MathUtilities.Sum(waterBalance.ESW) > MinESW &&
                accumulatedRain.Sum > MinRain)
            {
                Crop.Sow(population: Population, cultivar: CultivarName, depth: SowingDepth, rowSpacing: RowSpacing);    
            }
        }
    }
}
```
    Manager Fertilise Maize at sowing
      Crop = Maize
      FertiliserType = NO3N
      Amount = 150.0
```csharp
using Models.Soils;
using System;
using System.Linq;
using Models.Core;
using Models.PMF;
namespace Models
{
    [Serializable]
    public class Script : Model
    {
        [Link] Clock Clock;
        [Link] Fertiliser Fertiliser;
        
        [Description("Crop to be fertilised")]
        public IPlant Crop { get; set; }

        [Description("Type of fertiliser to apply? ")] 
        public Fertiliser.Types FertiliserType { get; set; }
    
        [Description("Amount of fertiliser to be applied (kg/ha)")]
        public double Amount { get; set; }
        
        [EventSubscribe("Sowing")]
        private void OnSowing(object sender, EventArgs e)
        {
            Model crop = sender as Model;
            if (Crop != null && crop.Name.ToLower() == (Crop as IModel).Name.ToLower())
                Fertiliser.Apply(Amount: Amount, Type: FertiliserType);
        }
    }
}
```
    Manager Fertilise nan at sowing
      Crop = -
      FertiliserType = UreaN
      Amount = 50.0
      script: same as in Management.Fertilise Maize at sowing
    Manager Auto irrigation for Maize
      Crop = Maize
      Amount = 30.0
      CriticalFraction = 0.5
```csharp
using Models.Soils;
using Models.PMF;
using Models.Core;
using System;
using System.Linq;

namespace Models
{
    [Serializable]
    public class Script : Model
    {
        [Link] Clock Clock;
        [Link] Irrigation Irrigation;
        [Link] ISoilWater WaterBalance;
        
        [Description("Crop")]
        public IPlant Crop { get; set; }
        
        [Description("Irrigation amount (mm)")]
        public double Amount { get; set; }
        
        [Description("Critical fraction of available water")]
        public double CriticalFraction { get; set; }
        
        [EventSubscribe("DoManagement")]
        private void OnDoManagement(object sender, EventArgs e)
        {
            if (Crop.IsAlive)
            {
                double[] esw = WaterBalance.ESW;
                double[] paw = WaterBalance.PAW;
                double totalESW = esw.Sum();
                double totalPAW = paw.Sum();
                
                if (totalPAW > 0 && totalESW / totalPAW < CriticalFraction)
                {
                    Irrigation.Apply(Amount);
                }
            }
        }
    }
}
```
    Manager Harvest Maize
      Crop = Maize
```csharp
using APSIM.Shared.Utilities;
using Models.Utilities;
using Models.Soils;
using Models.PMF;
using Models.Core;
using System;
using System.Linq;

namespace Models
{
    [Serializable] 
    public class Script : Model
    {
        [Description("Crop")]
        public IPlant Crop { get; set; }
        
        [EventSubscribe("DoManagement")]
        private void OnDoManagement(object sender, EventArgs e)
        {
            if (Crop.IsReadyForHarvesting)
            {
                Crop.Harvest();
                Crop.EndCrop();
            }
        }
    }
}
```
  Folder Maize Management
    Manager Sow Maize using a rule: same as Management.Sow Maize using a rule
    Manager Fertilise Maize at sowing: same as Management.Fertilise Maize at sowing
    Manager Fertilise nan at sowing: same as Management.Fertilise nan at sowing
    Manager Auto irrigation for Maize: same as Management.Auto irrigation for Maize
    Manager Harvest Maize: same as Management.Harvest Maize
    Manager Sow Maize using a rule: same as Management.Sow Maize using a rule
    Manager Fertilise Maize at sowing: same as Management.Fertilise Maize at sowing
    Manager Fertilise nan at sowing: same as Management.Fertilise nan at sowing
    Manager Auto irrigation for Maize: same as Management.Auto irrigation for Maize
    Manager Harvest Maize: same as Management.Harvest Maize
    Manager Sow Maize using a rule: same as Management.Sow Maize using a rule
    Manager Fertilise Maize at sowing: same as Management.Fertilise Maize at sowing
    Manager Fertilise nan at sowing: same as Management.Fertilise nan at sowing
    Manager Auto irrigation for Maize: same as Management.Auto irrigation for Maize
    Manager Harvest Maize: same as Management.Harvest Maize
