Simulations Management Operations: Version=174
  Folder Management
    Manager Sow maize on a fixed date
      Crop = maize
      SowingDate = 5-nov
      CultivarName = 24
      SowingDepth = 30.0
      RowSpacing = 500.0
      Population = 7.0
```csharp
using Models.Soils;
using System;
using Models.Core;
using Models.PMF;
using APSIM.Shared.Utilities;

namespace Models
{
    [Serializable]
    public class Script : Model
    {
        [Link] Clock Clock;
        
        [Description("Crop to sow")]
        public IPlant Crop { get; set; }
        
        [Description("Sowing date (d-mmm)")]
        public string SowingDate { get; set; }
        
        [Display(Type = DisplayType.CultivarName)]
        [Description("Cultivar to be sown")]
        public string CultivarName { get; set; }

        [Description("Sowing depth (mm)")]
        public double SowingDepth { get; set; }

        [Description("Row spacing (mm)")]
        public double RowSpacing { get; set; }

        [Description("Plant population (/m2)")]
        public double Population { get; set; }
        
        [EventSubscribe("DoManagement")]
        private void OnDoManagement(object sender, EventArgs e)
        {
            if (DateUtilities.DatesEqual(SowingDate, Clock.Today) && !Crop.IsAlive)
            {
                Crop.Sow(population: Population, cultivar: CultivarName, depth: SowingDepth, rowSpacing: RowSpacing);
            }
        }
    }
}
```
    Manager Tillage on 5-nov
      TillageDate = 5-nov
      TillageType = disc
```csharp
using Models.Soils;
using Models.Core;
using System;
using APSIM.Shared.Utilities;

namespace Models
{
    [Serializable]
    public class Script : Model
    {
        [Link] Clock Clock;
        [Link] Tillage Tillage;
        
        [Description("Tillage date (d-mmm)")]
        public string TillageDate { get; set; }
        
        [Description("Tillage type")]
        public string TillageType { get; set; }
        
        [EventSubscribe("DoManagement")]
        private void OnDoManagement(object sender, EventArgs e)
        {
            if (DateUtilities.DatesEqual(TillageDate, Clock.Today))
                Tillage.Apply(TillageType);
        }
    }
}
```
    Manager Harvest maize
      Crop = maize
```csharp
using APSIM.Shared.Utilities;
using Models.Utilities;
using Models.Soils;
using Models.PMF;
using Models.Core;
using System;
using System.Linq;

namespace Models
{
    [Serializable] 
    public class Script : Model
    {
        [Description("Crop")]
        public IPlant Crop { get; set; }
        
        [EventSubscribe("DoManagement")]
        private void OnDoManagement(object sender, EventArgs e)
        {
            if (Crop.IsReadyForHarvesting)
            {
                Crop.Harvest();
                Crop.EndCrop();
            }
        }
    }
}
```
  Folder Management Operations
    Manager Sow maize on a fixed date: same as Management.Sow maize on a fixed date
    Manager Tillage on 5-nov: same as Management.Tillage on 5-nov
    Manager Harvest maize: same as Management.Harvest maize
    Manager Sow maize on a fixed date: same as Management.Sow maize on a fixed date
    Manager Tillage on 5-nov: same as Management.Tillage on 5-nov
    Manager Harvest maize: same as Management.Harvest maize
