Simulations Soybean Complete Cycle: Version=174
  Folder Management
    Manager Tillage on 1-oct
      TillageDate = 1-oct
      TillageType = disc
```csharp
using Models.Soils;
using Models.Core;
using System;
using APSIM.Shared.Utilities;

namespace Models
{
    [Serializable]
    public class Script : Model
    {
        [Link] Clock Clock;
        [Link] Tillage Tillage;
        
        [Description("Tillage date (d-mmm)")]
        public string TillageDate { get; set; }
        
        [Description("Tillage type")]
        public string TillageType { get; set; }
        
        [EventSubscribe("DoManagement")]
        private void OnDoManagement(object sender, EventArgs e)
        {
            if (DateUtilities.DatesEqual(TillageDate, Clock.Today))
                Tillage.Apply(TillageType);
        }
    }
}
```
    Manager Sow Soybean on a fixed date
      Crop = Soybean
      SowingDate = 15-oct
      CultivarName = Dawson
      SowingDepth = 40.0
      RowSpacing = 500.0
      Population = 25.0
```csharp
using Models.Soils;
using System;
using Models.Core;
using Models.PMF;
using APSIM.Shared.Utilities;

namespace Models
{
    [Serializable]
    public class Script : Model
    {
        [Link] Clock Clock;
        
        [Description("Crop to sow")]
        public IPlant Crop { get; set; }
        
        [Description("Sowing date (d-mmm)")]
        public string SowingDate { get; set; }
        
        [Display(Type = DisplayType.CultivarName)]
        [Description("Cultivar to be sown")]
        public string CultivarName { get; set; }

        [Description("Sowing depth (mm)")]
        public double SowingDepth { get; set; }

        [Description("Row spacing (mm)")]
        public double RowSpacing { get; set; }

        [Description("Plant population (/m2)")]
        public double Population { get; set; }
        
        [EventSubscribe("DoManagement")]
        private void OnDoManagement(object sender, EventArgs e)
        {
            if (DateUtilities.DatesEqual(SowingDate, Clock.Today) && !Crop.IsAlive)
            {
                Crop.Sow(population: Population, cultivar: CultivarName, depth: SowingDepth, rowSpacing: RowSpacing);
            }
        }
    }
}
```
    Manager Fertilise Soybean at sowing
      Crop = Soybean
      FertiliserType = MAP
      Amount = 100.0
```csharp
using Models.Soils;
using System;
using System.Linq;
using Models.Core;
using Models.PMF;
namespace Models
{
    [Serializable]
    public class Script : Model
    {
        [Link] Clock Clock;
        [Link] Fertiliser Fertiliser;
        
        [Description("Crop to be fertilised")]
        public IPlant Crop { get; set; }

        [Description("Type of fertiliser to apply? ")] 
        public Fertiliser.Types FertiliserType { get; set; }
    
        [Description("Amount of fertiliser to be applied (kg/ha)")]
        public double Amount { get; set; }
        
        [EventSubscribe("Sowing")]
        private void OnSowing(object sender, EventArgs e)
        {
            Model crop = sender as Model;
            if (Crop != null && crop.Name.ToLower() == (Crop as IModel).Name.ToLower())
                Fertiliser.Apply(Amount: Amount, Type: FertiliserType);
        }
    }
}
```
    Manager Auto irrigation for Soybean
      Crop = Soybean
      Amount = 25.0
      CriticalFraction = 0.4
```csharp
using Models.Soils;
using Models.PMF;
using Models.Core;
using System;
using System.Linq;

namespace Models
{
    [Serializable]
    public class Script : Model
    {
        [Link] Clock Clock;
        [Link] Irrigation Irrigation;
        [Link] ISoilWater WaterBalance;
        
        [Description("Crop")]
        public IPlant Crop { get; set; }
        
        [Description("Irrigation amount (mm)")]
        public double Amount { get; set; }
        
        [Description("Critical fraction of available water")]
        public double CriticalFraction { get; set; }
        
        [EventSubscribe("DoManagement")]
        private void OnDoManagement(object sender, EventArgs e)
        {
            if (Crop.IsAlive)
            {
                double[] esw = WaterBalance.ESW;
                double[] paw = WaterBalance.PAW;
                double totalESW = esw.Sum();
                double totalPAW = paw.Sum();
                
                if (totalPAW > 0 && totalESW / totalPAW < CriticalFraction)
                {
                    Irrigation.Apply(Amount);
                }
            }
        }
    }
}
```
    Manager Harvest Soybean
      Crop = Soybean
```csharp
using APSIM.Shared.Utilities;
using Models.Utilities;
using Models.Soils;
using Models.PMF;
using Models.Core;
using System;
using System.Linq;

namespace Models
{
    [Serializable] 
    public class Script : Model
    {
        [Description("Crop")]
        public IPlant Crop { get; set; }
        
        [EventSubscribe("DoManagement")]
        private void OnDoManagement(object sender, EventArgs e)
        {
            if (Crop.IsReadyForHarvesting)
            {
                Crop.Harvest();
                Crop.EndCrop();
            }
        }
    }
}
```
