Simulations: Version=180
  Simulation
    Zone Field: Area=1; Slope=0
      Soil: SoilType=Deep Clay; Site=DeepSite; NearestTown=DeepSite; Latitude=-35; Longitude=149; DataSource=Generated by ModFileGen ApsimSoilConverter
        Physical
          Thickness  BD    AirDry  LL15  DUL   SAT    KS
          150        1     0.1     0.2   0.4   0.5    20
          150        1.05  0.12    0.21  0.41  0.505  20
          200        1.1   0.14    0.22  0.42  0.51   20
          200        1.15  0.16    0.23  0.43  0.515  20
          200        1.2   0.18    0.24  0.44  0.52   20
          200        1.25  0.2     0.25  0.45  0.525  20
          200        1.3   0.22    0.26  0.46  0.53   20
          200        1.35  0.24    0.27  0.47  0.535  20
          200        1.4   0.26    0.28  0.48  0.54   20
          200        1.45  0.28    0.29  0.49  0.545  20
        WaterBalance SoilWater: SummerDate=1-Nov; SummerU=5; SummerCona=5; WinterDate=1-Apr; WinterU=5; WinterCona=5; DiffusConst=40; DiffusSlope=16; Salb=0.12; CN2Bare=73; CNRed=20; CNCov=0.8; PSIDul=-100; Thickness=[150, 150, 200, 200, 200, 200, 200, 200, 200, 200]; SWCON=[0.3, 0.3, 0.3, 0.3, 0.3, 0.3, 0.3, 0.3, 0.3, 0.3]
        Organic: FOMCNRatio=40; CarbonUnits=Total
          Thickness  Carbon     SoilCNRatio  FBiom       FInert  FOM
          150        2          12           0.04        0.4     334.431
          150        1.4        12           0.02        0.55    322.196
          200        0.98       12           0.01        0.7     306.577
          200        0.686      12           0.005       0.85    291.715
          200        0.4802     12           0.0025      1       277.573
          200        0.33614    12           0.00125     1       264.117
          200        0.235298   12           0.000625    1       251.313
          200        0.164709   12           0.0003125   1       239.13
          200        0.115296   12           0.00015625  1       227.537
          200        0.0807072  12           7.8125e-05  1       216.507
        Chemical: Thickness=[150, 150, 200, 200, 200, 200, 200, 200, 200, 200]; PH=[6.5, 6.65, 6.8, 6.95, 7.1, 7.25, 7.4, 7.55, 7.7, 7.85]; PHUnits=Water
        Water: Thickness=[150, 150, 200, 200, 200, 200, 200, 200, 200, 200]; InitialValues=[0.4, 0.41, 0.42, 0.43, 0.44, 0.45, 0.46, 0.47, 0.48, 0.49]; InitialPAWmm=380; RelativeTo=LL15; FilledFromTop=false
        CERESSoilTemperature Temperature
        Nutrient
