Simulations Fertilization Schedule: Version=174
  Folder Management
    Manager Fertilise Cotton at sowing
      Crop = Cotton
      FertiliserType = NO3N
      Amount = 50.0
```csharp
using Models.Soils;
using System;
using System.Linq;
using Models.Core;
using Models.PMF;
namespace Models
{
    [Serializable]
    public class Script : Model
    {
        [Link] Clock Clock;
        [Link] Fertiliser Fertiliser;
        
        [Description("Crop to be fertilised")]
        public IPlant Crop { get; set; }

        [Description("Type of fertiliser to apply? ")] 
        public Fertiliser.Types FertiliserType { get; set; }
    
        [Description("Amount of fertiliser to be applied (kg/ha)")]
        public double Amount { get; set; }
        
        [EventSubscribe("Sowing")]
        private void OnSowing(object sender, EventArgs e)
        {
            Model crop = sender as Model;
            if (Crop != null && crop.Name.ToLower() == (Crop as IModel).Name.ToLower())
                Fertiliser.Apply(Amount: Amount, Type: FertiliserType);
        }
    }
}
```
    Manager Fertilise nan at sowing
      Crop = -
      FertiliserType = UreaN
      Amount = 75.0
      script: same as in Management.Fertilise Cotton at sowing
    Manager Fertilise nan at sowing: same as Management.Fertilise nan at sowing
