Simulations Irrigation Management: Version=174
  Folder Management
    Manager Auto irrigation for Cotton
      Crop = Cotton
      Amount = 30.0
      CriticalFraction = 0.5
```csharp
using Models.Soils;
using Models.PMF;
using Models.Core;
using System;
using System.Linq;

namespace Models
{
    [Serializable]
    public class Script : Model
    {
        [Link] Clock Clock;
        [Link] Irrigation Irrigation;
        [Link] ISoilWater WaterBalance;
        
        [Description("Crop")]
        public IPlant Crop { get; set; }
        
        [Description("Irrigation amount (mm)")]
        public double Amount { get; set; }
        
        [Description("Critical fraction of available water")]
        public double CriticalFraction { get; set; }
        
        [EventSubscribe("DoManagement")]
        private void OnDoManagement(object sender, EventArgs e)
        {
            if (Crop.IsAlive)
            {
                double[] esw = WaterBalance.ESW;
                double[] paw = WaterBalance.PAW;
                double totalESW = esw.Sum();
                double totalPAW = paw.Sum();
                
                if (totalPAW > 0 && totalESW / totalPAW < CriticalFraction)
                {
                    Irrigation.Apply(Amount);
                }
            }
        }
    }
}
```
    Manager Irrigate on 15-jan
      IrrigDate = 15-jan
      Amount = 50.0
```csharp
using Models.Core;
using System;
using APSIM.Shared.Utilities;

namespace Models
{
    [Serializable]
    public class Script : Model
    {
        [Link] Clock Clock;
        [Link] Irrigation Irrigation;
        
        [Description("Irrigation date (d-mmm)")]
        public string IrrigDate { get; set; }
        
        [Description("Irrigation amount (mm)")]
        public double Amount { get; set; }
        
        [EventSubscribe("DoManagement")]
        private void OnDoManagement(object sender, EventArgs e)
        {
            if (DateUtilities.DatesEqual(IrrigDate, Clock.Today))
                Irrigation.Apply(Amount);
        }
    }
}
```
