Simulations: Version=180
  Simulation
    Zone Field: Area=1; Slope=0
      Soil: SoilType=Sandy Loam; Site=MinimalSite; NearestTown=MinimalSite; Latitude=45; Longitude=-93; DataSource=Generated by ModFileGen ApsimSoilConverter
        Physical
          Thickness  BD   AirDry  LL15  DUL   SAT   KS
          200        1.1  0.1     0.2   0.4   0.5   20
          200        1.2  0.11    0.22  0.42  0.52  20
          400        1.3  0.12    0.24  0.44  0.54  20
        WaterBalance SoilWater: SummerDate=1-Nov; SummerU=5; SummerCona=5; WinterDate=1-Apr; WinterU=5; WinterCona=5; DiffusConst=40; DiffusSlope=16; Salb=0.12; CN2Bare=73; CNRed=20; CNCov=0.8; PSIDul=-100; Thickness=[200, 200, 400]; SWCON=[0.3, 0.3, 0.3]
        Organic: FOMCNRatio=40; CarbonUnits=Total
          Thickness  Carbon  SoilCNRatio  FBiom  FInert  FOM
          200        1.2     12           0.04   0.4     330.302
          200        0.96    12           0.02   0.55    314.29
          400        0.768   12           0.01   0.7     284.556
        Chemical: Thickness=[200, 200, 400]; PH=[8, 8, 8]; PHUnits=Water
        Water: Thickness=[200, 200, 400]; InitialValues=[0.4, 0.42, 0.44]; InitialPAWmm=160; RelativeTo=LL15; FilledFromTop=false
        CERESSoilTemperature Temperature
        Nutrient
