Simulations: Version=180
  Simulation
    Zone Field: Area=1; Slope=0
      Soil: SoilType=Clay; Site=TestSite; NearestTown=TestSite; Latitude=-27.58; Longitude=151.32; DataSource=Generated by ModFileGen ApsimSoilConverter
        Physical
          Thickness  BD    AirDry  LL15  DUL   SAT   KS
          150        1.02  0.13    0.26  0.52  0.59  20
          150        1.07  0.2     0.25  0.5   0.57  20
          300        1.09  0.28    0.28  0.49  0.56  20
          300        1.16  0.28    0.28  0.48  0.53  20
          300        1.17  0.28    0.28  0.47  0.53  20
        WaterBalance SoilWater: SummerDate=1-Nov; SummerU=5; SummerCona=5; WinterDate=1-Apr; WinterU=5; WinterCona=5; DiffusConst=40; DiffusSlope=16; Salb=0.12; CN2Bare=73; CNRed=20; CNCov=0.8; PSIDul=-100; Thickness=[150, 150, 300, 300, 300]; SWCON=[0.3, 0.3, 0.3, 0.3, 0.3]
        Organic: FOMCNRatio=40; CarbonUnits=Total
          Thickness  Carbon  SoilCNRatio  FBiom   FInert  FOM
          150        1.2     12           0.04    0.4     334.431
          150        0.96    12           0.02    0.55    322.196
          300        0.6     12           0.01    0.7     299.054
          300        0.3     12           0.005   0.85    277.573
          300        0.18    12           0.0025  1       257.635
        Chemical: Thickness=[150, 150, 300, 300, 300]; PH=[8, 8, 8, 8, 8]; PHUnits=Water
        Water: Thickness=[150, 150, 300, 300, 300]; InitialValues=[0.52, 0.5, 0.49, 0.48, 0.47]; InitialPAWmm=256.5; RelativeTo=LL15; FilledFromTop=false
        CERESSoilTemperature Temperature
        Nutrient
